// SBML level 2 version 4

function pow3(x)
  x^3;
end

model TestModel_for_IB2013()
  // not
  // biomodels.db:BIOMD0000000003
  // isDescribedBy pubmed:1833774
  // isVersionOf kegg.pathway:hsa04110 reactome:REACT_152

  // Compartments:
  compartment compartment = 1;

  // Species:
  species A in compartment; A is "RB/E2F";
  species B in compartment; B is "RB-Hypo";
  species C in compartment; C is "free E3F";
  species D in compartment = 0; D is "cycE/cdk2";
  species E in compartment = 0; E is "unused";
  species x in compartment = 0; x is "unused2";

  // Parameters:
  tau2 = 3e-2;
  Km1 = 10.7;

  // Assignment rules:
  C := k3/k2;
  B := k*x/(1 + k2);
  A := 0.1*x;

  // Reactions:
  r: A -> C + B; k*S2*X0*c1;  // modifiers: D
    k = 0.1;

  // Events:
  at (P_1 <= P_2), t0=false: A = k2reset;

  // Unit definitions:
  unit foot = 0.3048 metre;
end
